freq[0] := 6
amp[0] := 31
NS := 1000
NF := 11
freq[1] := 60
amp[1] := 0
dfreq := 2000
freq[2] := 80
amp[2] := 0
dtime := 1/dfreq = 0.0005
freq[3] := 100
amp[3] := 0
dn := dfreq/NS = 2
freq[4] := 200
amp[4] := 0
i := 0, 1 .. NS
freq[5] := 300
amp[5] := 31
ns[i] := 0 + i
freq[6] := 400
amp[6] := 0
time[i] := ns[i]*dtime
freq[7] := 500
amp[7] := 0
freq[8] := 600
amp[8] := 0
freq[9] := 800
amp[9] := 0
freq[10] := 1000
amp[10] := 31
f(x) := sum(amp[i]*(cos(2*π*freq[i]*x) + 1), i = 0 .. NF - 1)
s[i] := f(time[i])
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# D:\Desktop\Study_now\SRW\GoertzelAlgorithm\src\sim\sample.csv
sc := ceil(s)
sum(ceil(s[i]), i = 0 .. NS)/NS = 93.711
s =  # no stored result
sc =  # no stored result
scp := sc*13/256
S(freq) :=
    k ← freq/dn
    alpha ← 2*cos(2*π*k/NS)
    Wre ← cos(2*π*k/NS)
    Wim ← sin(2*π*k/NS)
    vm1 ← 0
    vm2 ← 0
    for iii ∈ 0, 1 .. NS - 1
        v[iii] ← scp[iii] + alpha*vm1 - vm2 if iii == 0
        v[iii] ← scp[iii] + alpha*v[iii - 1] - vm1 if iii == 1
        v[iii] ← scp[iii] + alpha*v[iii - 1] - v[iii - 2] otherwise
        iii ← iii + 1
    vWre ← v[NS - 2]*Wre
    vWim ← v[NS - 2]*Wim
    S ← (vWre - v[NS - 3])^2 + vWim^2
    M[0] ← S
    M[1] ← v
    M[2] ← Wre
    M[3] ← Wim
    M[4] ← vWre
    M[5] ← vWim
    return M
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sin(2*π*500/1000) = 1.22461e-16
k := 9
SS := S(freq[k])
freq[k] = 800
10574000
SS[2] = -0.809017
10749000
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SS[3] = 0.587785
10966000/3098600 = 3.53902
2*SS[2] = -1.61803
scp =  # no stored result
10966000/589940 = 18.5883
SS[1] =  # no stored result
SS[4] = -0.445918
SS[5] = 0.323978
42725000/10966000 = 3.89613
SS[4] - SS[1][NS - 3] = -5.24158
cos(2*π*freq/(2*NS)) = [0.999822; 0.982287; 0.968583; 0.951057; 0.809017; 0.587785; 0.309017; 0; -0.309017; -0.809017; -1]
sin(2*π*freq/(2*NS)) = [0.0188484; 0.187381; 0.24869; 0.309017; 0.587785; 0.809017; 0.951057; 1; 0.951057; 0.587785; 0]
2*cos(2*π*freq/(2*NS)) = [1.99964; 1.96457; 1.93717; 1.90211; 1.61803; 1.17557; 0.618034; 0; -0.618034; -1.61803; -2]
π*0.2 = 0.628319
freq/NS = [0.006; 0.06; 0.08; 0.1; 0.2; 0.3; 0.4; 0.5; 0.6; 0.8; 1]
2*π*200/(2*NS) = 0.628319
cos(0.628319) = 0.809017
2*π*600/(2*NS) = 1.88496
cos(1.884956) = -0.309017
2*π*600/(2*NS) - π/2 = 0.314159
-sin(0.314159) = -0.309017
